ORIGIN := 1  # задание 1 и 2
Γ := 3
Ν := 16
# задание 3
a := Γ*Ν = 48
b := Γ + Ν = 19
a11 := (a + b)/2
V := [Γ + Ν + 1; Γ + Ν + 2]
M := [Γ + Ν + 1, Γ + Ν + 2; Γ + Ν + 3, Γ + Ν + 4]
M1 := [(a + b)/2, (a - b)/2; 2/(a + b), 2/(a - b)]
M1 = [33.5, 14.5; 0.0298507, 0.0689655]
cols(V) = 1
cols(M) = 2
|V| = 29
V = [20; 21]
rows(V) = 2
rows(M) = 2
length(V) = 2
|M1| = 1.87751
M1 → [67/2, 29/2; 2/67, 2/29]
|M| = -2
M = [20, 21; 22, 23]
last(V) = 2
|M1| → 3648/1943 = 1.87751
# команда Origin меняет показатель отсчета изначально он 0, теперь он изменен на 1
M1[1, 1] = 33.5
M1[1, 1] → 67/2
M1[1, 2] = 14.5
M1[1, 2] → 29/2
# задание 4
M1[2, 1] = 0.0298507
M1[2, 1] → 2/67
M2[1, 1] := Γ + Ν + 1
M2[2, 1] := Γ + Ν + 3
M1[2, 2] = 0.0689655
M1[2, 2] → 2/29
M2[2, 2] := Γ + Ν + 4
M2[1, 2] := Γ + Ν + 2
M2 := [M2[1, 1], M2[1, 2]; M2[2, 1], M2[2, 2]] = [20, 21; 22, 23]
M2 = [20, 21; 22, 23]
# задание 5
V1 := M[:, 2] = [21; 23]
transpose(V1) = [21, 23]
V2 := transpose(M)[:, 2] = [22; 23]
# задание 6
i1 := 1 .. 8
j1 := i1
i3 := 1 .. 4
S[i1, j1] := Γ*i1 + Ν*j1
S = [
    19, 35, 51, 67, 83, 99, 115, 131;
    22, 38, 54, 70, 86, 102, 118, 134;
    25, 41, 57, 73, 89, 105, 121, 137;
    28, 44, 60, 76, 92, 108, 124, 140;
    31, 47, 63, 79, 95, 111, 127, 143;
    34, 50, 66, 82, 98, 114, 130, 146;
    37, 53, 69, 85, 101, 117, 133, 149;
    40, 56, 72, 88, 104, 120, 136, 152
]
X[i3] := 2*Γ*i3 + 2*Ν
Y[i3] := X[i3]^2
X = [38; 44; 50; 56]
Y = [1444; 1936; 2500; 3136]
A[i3, 1] := X[i3]
A[i3, 2] := Y[i3]
A = [38, 1444; 44, 1936; 50, 2500; 56, 3136]
WRITEPRN("16_КОРОТКОВ_ГРИГОРИЙ0") := A
WRITEPRN("16_КОРОТКОВ_ГРИГОРИЙ1") := S
R[i1, j1] := S[i1, j1]^2
R = [
    361, 1225, 2601, 4489, 6889, 9801, 13225, 17161;
    484, 1444, 2916, 4900, 7396, 10404, 13924, 17956;
    625, 1681, 3249, 5329, 7921, 11025, 14641, 18769;
    784, 1936, 3600, 5776, 8464, 11664, 15376, 19600;
    961, 2209, 3969, 6241, 9025, 12321, 16129, 20449;
    1156, 2500, 4356, 6724, 9604, 12996, 16900, 21316;
    1369, 2809, 4761, 7225, 10201, 13689, 17689, 22201;
    1600, 3136, 5184, 7744, 10816, 14400, 18496, 23104
]
WRITEPRN("16_КОРОТКОВ_ГРИГОРИЙ2") := R
# Задание 7
A2 := READPRN("16_КОРОТКОВ_ГРИГОРИЙ2.prn")
A2 = [
    361, 1225, 2601, 4489, 6889, 9801, 13230, 17160;
    484, 1444, 2916, 4900, 7396, 10400, 13920, 17960;
    625, 1681, 3249, 5329, 7921, 11030, 14640, 18770;
    784, 1936, 3600, 5776, 8464, 11660, 15380, 19600;
    961, 2209, 3969, 6241, 9025, 12320, 16130, 20450;
    1156, 2500, 4356, 6724, 9604, 13000, 16900, 21320;
    1369, 2809, 4761, 7225, 10200, 13690, 17690, 22200;
    1600, 3136, 5184, 7744, 10820, 14400, 18500, 23100
]
A22 := READPRN("ВАРИАНТ_16.prn")  # Это вариант из приложения,A22 вписал чтобы небыло конфликтов
A22 = [
    38.79, 58.69, 78.59, 98.48, 118.38, 138.27, 158.17, 178.07, 197.96;
    57.69, 77.59, 97.48, 117.38, 137.28, 157.17, 177.07, 196.96, 216.86;
    76.59, 96.48, 116.38, 136.28, 156.17, 176.07, 195.96, 215.86, 235.76;
    95.49, 115.38, 135.28, 155.17, 175.07, 194.97, 214.86, 234.76, 254.65;
    114.38, 134.28, 154.18, 174.07, 193.97, 213.86, 233.76, 253.66, 273.55;
    133.28, 153.18, 173.07, 192.97, 212.87, 232.76, 252.66, 272.55, 292.45
]
# Задание 8
a
L := [Ν + Γ + 1, Ν + Γ + 2, Ν + Γ + 3; Ν + Γ + 4, Ν + Γ + 5, Ν + Γ + 6; Ν + Γ + 7, Ν + Γ + 8, Ν + Γ + 9] = [20, 21, 22; 23, 24, 25; 26, 27, 28]
K := [0, -1, -2; 1, 0, -1; 2, 1, 0]
L + K = [20, 20, 20; 24, 24, 24; 28, 28, 28]
i := 1 .. 3
j := 1 .. 3
M3[i, j] := L[i, j] + K[i, j]
M3 = [20, 20, 20; 24, 24, 24; 28, 28, 28]
б
L - K = [20, 22, 24; 22, 24, 26; 24, 26, 28]
M4[i, j] := L[i, j] - K[i, j]
M4 = [20, 22, 24; 22, 24, 26; 24, 26, 28]
в
N := 16
N + L = [36, 37, 38; 39, 40, 41; 42, 43, 44]
M5[i, j] := N + L[i, j]
M5 = [36, 37, 38; 39, 40, 41; 42, 43, 44]
г
A3 := [N + Γ + 1, N + Γ + 3, N + Γ + 5, N + Γ + 7; N + Γ + 2, N + Γ + 4, N + Γ + 6, N + Γ + 8]
B3 := [N + Γ + 1, N + Γ + 5; N + Γ + 2, N + Γ + 6; N + Γ + 3, N + Γ + 7; N + Γ + 4, N + Γ + 8]
C3 := A3*B3
C3 = [1988, 2356; 2074, 2458]
sum(A3*B3, j = 1 .. 1) = [1988, 2356; 2074, 2458]
д
T := -N*L = [-320, -336, -352; -368, -384, -400; -416, -432, -448]
-L → [-20, -21, -22; -23, -24, -25; -26, -27, -28]
L*(-1) → [-20, -21, -22; -23, -24, -25; -26, -27, -28]
-N*L = [-320, -336, -352; -368, -384, -400; -416, -432, -448]
е
|C3| = 160
|V| → 29
|V| → 29
|C3| = 160
|C3| → 160
|V| = 29
|C3| → 160
|V| =  # error: Эта матрица должна быть квадратной.
# V это вектор, а вектор не может быть квадратным
ж
X := [Ν + Γ + 1; Ν + Γ + 2; Ν + Γ + 3] = [20; 21; 22]
Y := [Ν + Γ + 5; Ν + Γ + 6; Ν + Γ + 7] = [24; 25; 26]
X*Y = 1577
sum(X[j]*Y[j], j = 1 .. 3) = 1577
з
Z := X×Y = [-4; 8; -4]
Z := [
    X[2, 1]*Y[3, 1] - Y[2, 1]*X[3, 1];
    -(X[1, 1]*Y[3, 1] - X[3, 1]*Y[1, 1]);
    X[1, 1]*Y[2, 1] - X[2, 1]*Y[1, 1]
] = [-4; 8; -4]
transpose(X) = [20, 21, 22]
|X| = 36.4005
|Y| = 43.3244
X = [20; 21; 22]
ϕ := acos(X*Y/(|X|*|Y|)) = 0.00621296
Z = [-4; 8; -4]
|Z| = 9.79796
Z1 := |X|*|Y|*sin(ϕ)
Z1 = 9.79796
Z2[1] := (-1)^(1 - 1)*[X[2, 1], X[3, 1]; Y[2, 1], Y[3, 1]] = [21, 22; 25, 26]
Z2[2] := (-1)^(2 - 1)*[X[1, 1], X[3, 1]; Y[2, 1], Y[3, 1]] = [-20, -22; -25, -26]
Z2[3] := (-1)^(3 - 1)*[X[1, 1], X[2, 1]; Y[1, 1], Y[2, 1]] = [20, 21; 24, 25]
и
sum(X) + sum(Y) = 138
X[1] + X[2] + X[3] + Y[1] + Y[2] + Y[3] = 138
к
tr(L) = 72
sum(L[j, j], j = 1 .. 2) = 44
л
M6 := [0, Ν*π/3; -Ν*π/2, Ν*π] = [0, 16.7552; -25.1327, 50.2655]
vectorize(sin(M6)) = [0, -0.866025; 0, 0]
м
A4 := [Γ + Ν + 1, Γ + Ν + 4, Γ + Ν + 2; Γ + Ν + 3, Γ + Ν + 0, Γ + Ν + 1; Γ + Ν + 7, Γ + Ν + 8, Γ + Ν + 9] = [20, 23, 21; 22, 19, 20; 26, 27, 28]
A4^-1 → [2/67, 77/268, -61/268; 24/67, -7/134, -31/134; -25/67, -29/134, 63/134]
|A4| → -268
A4^-1 = [0.0298507, 0.287313, -0.227612; 0.358209, -0.0522388, -0.231343; -0.373134, -0.216418, 0.470149]
B[1, 1] := (-1)^(1 + 1)*det([19, 20; 27, 28])/|A4| = 0.0298507
B[2, 1] := (-1)^(2 + 1)*det([22, 20; 26, 28])/|A4| = 0.358209
B[3, 1] := (-1)^(3 + 1)*det([22, 19; 26, 27])/|A4| = -0.373134
B4[i, j] == (-1)^(i + j)*minor(A4[i, j])/|A4|
B[1, 2] := (-1)^(1 + 2)*det([23, 21; 27, 28])/|A4| = 0.287313
B[2, 2] := (-1)^(2 + 2)*det([20, 21; 26, 28])/|A4| = -0.0522388
B[3, 2] := (-1)^(3 + 2)*det([20, 23; 26, 27])/|A4| = -0.216418
B[1, 3] := (-1)^(1 + 3)*det([23, 21; 19, 20])/|A4| = -0.227612
B[2, 3] := (-1)^(2 + 3)*det([20, 21; 22, 20])/|A4| = -0.231343
B[3, 3] := (-1)^(3 + 3)*det([20, 23; 22, 19])/|A4| = 0.470149
н
B = [0.0298507, 0.287313, -0.227612; 0.358209, -0.0522388, -0.231343; -0.373134, -0.216418, 0.470149]
B5 := mod(N, 7) = 2
B5 := identity(mod(N, 5) + 2) = [1, 0, 0; 0, 1, 0; 0, 0, 1]
A4*A4^-1 = [1, 0, 0; 0, 1, 0; 0, 0, 1]
о
A4^0 = [1, 0, 0; 0, 1, 0; 0, 0, 1]
V5 := [Γ + N + 1; Γ + N + 2; Γ + N + 3] = [20; 21; 22]
C5 := diag(V5) = [20, 0, 0; 0, 21, 0; 0, 0, 22]
п
Z4 := submatrix(A4, 2, 3, 2, 3) = [19, 20; 27, 28]
Z5 := submatrix(A4, 3, 3, 2, 3) = [27, 28]
Z6 := submatrix(A4, 1, 3, 2, 2) = [23; 19; 27]
р
F := augment(V5, Z, Z6) = [20, -4, 23; 21, 8, 19; 22, -4, 27]
A4 = [20, 23, 21; 22, 19, 20; 26, 27, 28]
с
L = [20, 21, 22; 23, 24, 25; 26, 27, 28]
G := stack(A4, L) = [20, 23, 21; 22, 19, 20; 26, 27, 28; 20, 21, 22; 23, 24, 25; 26, 27, 28]
т
csort(F, 2) = [20, -4, 23; 22, -4, 27; 21, 8, 19]
у
rsort(F, 3) = [-4, 20, 23; 8, 21, 19; -4, 22, 27]
ф
V6 := [Ν + 6*mod(3, Γ) + 1; Ν + 2*mod(4, Γ) + 1; Ν + 8*mod(5, Γ) + 1]
# Добавлена константа Γ так как mod выдовал ошибку, что нужны 2 параметра
sort(V6) = [17; 19; 33]
х
reverse(V6) = [33; 19; 17]
# задание 9
[
    2*x + y + z + 3*t == 6;
    2*x + y + 3*z + 2*t == 12;
    6*x + 2*y + 5*z - 5*t == 5;
    -6*x - 2*y - 3*z + 5*t == 3
] solve, [x, y, z, t] → [3/2, -7, 4, 2]
B := [6; 12; 5; 3]
A := [2, 1, 1, 3; 2, 1, 3, 2; 6, 2, 5, -5; -6, -2, -3, 5]
A^-1*B = [1.5; -7; 4; 2]
lsolve(A, B) = [1.5; -7; 4; 2]
# Применены 2 типа решения
